// SBML level 2 version 4

function HMM_with_enzyme_3(Km, Lpd, RacGTP, kcat)
  kcat*RacGTP*Lpd/(Km + Lpd);
end

function Henri_Michaelis_Menten__irreversible__3(Km, Lpd_active, V)
  V*Lpd_active/(Km + Lpd_active);
end
Henri_Michaelis_Menten__irreversible__3 is "Henri-Michaelis-Menten (irreversible)_3";

function HMM_with_enzyme_4(Km, Lpd_active, RacGEF, kcat)
  kcat*Lpd_active*RacGEF/(Km + RacGEF);
end

function HMM_with_enzyme_5(Km, Lpd_active, RacGAP, kcat)
  kcat*Lpd_active*RacGAP/(Km + RacGAP);
end

function Henri_Michaelis_Menten__irreversible__2(Km, SW_active, V)
  V*SW_active/(Km + SW_active);
end
Henri_Michaelis_Menten__irreversible__2 is "Henri-Michaelis-Menten (irreversible)_2";

function Henri_Michaelis_Menten__irreversible__5(Km, RacGAP_active, V)
  V*RacGAP_active/(Km + RacGAP_active);
end
Henri_Michaelis_Menten__irreversible__5 is "Henri-Michaelis-Menten (irreversible)_5";

function HMM_with_enzyme_7(Km, RacGAP_active, RacGTP, kcat)
  kcat*RacGAP_active*RacGTP/(Km + RacGTP);
end

function HMM_with_enzyme_10(Km, NHSL1_active, SW_cytoplasm, kcat)
  kcat*NHSL1_active*SW_cytoplasm/(Km + SW_cytoplasm);
end

function HMM__irreversible(kcat, Substrate, Enzyme, Km)
  kcat*Substrate*Enzyme/(Km + Substrate);
end
HMM__irreversible is "HMM (irreversible)";

function Henri_Michaelis_Menten__irreversible__4(Km, RacGEF_active, V)
  V*RacGEF_active/(Km + RacGEF_active);
end
Henri_Michaelis_Menten__irreversible__4 is "Henri-Michaelis-Menten (irreversible)_4";

function HMM_with_enzyme_6(Km, RacGDP, RacGEF_active, kcat)
  kcat*RacGEF_active*RacGDP/(Km + RacGDP);
end

function HMM_with_enzyme_2(Km, NHSL1_active, SW_active, kcat)
  kcat*NHSL1_active*SW_active/(Km + SW_active);
end

function HMM_with_enzyme_1(Km, NHSL1, RacGTP, kcat)
  kcat*RacGTP*NHSL1/(Km + NHSL1);
end

function HMM_with_enzyme_8(Km, RacGTP, SW, kcat)
  kcat*RacGTP*SW/(Km + SW);
end

function HMM_with_enzyme_9(Km, Lpd_active, SW, kcat)
  kcat*Lpd_active*SW/(Km + SW);
end

function Henri_Michaelis_Menten__irreversible__1(Km, NHSL1_active, V)
  V*NHSL1_active/(Km + NHSL1_active);
end
Henri_Michaelis_Menten__irreversible__1 is "Henri-Michaelis-Menten (irreversible)_1";

model Rough_Draft___Mathematical_Model_1()
  // Rough Draft - Mathematical Model_1

  // Compartments:
  compartment Cell = 1;

  // Species:
  species Lpd in Cell = 90;
  species Lpd_active in Cell = 10;
  species RacGEF in Cell = 9;
  species RacGEF_active in Cell = 1;
  species RacGAP in Cell = 180;
  species RacGAP_active in Cell = 20;
  species NHSL1 in Cell = 90;
  species NHSL1_active in Cell = 10;
  species RacGDP in Cell = 90;
  species RacGTP in Cell = 10;
  species SW in Cell = 80;
  species SW_active in Cell = 10;
  species SW_cytoplasm in Cell = 10;

  // Parameters:
  No_Name = 0;

  // Reactions:
  V1: NHSL1 => NHSL1_active; Cell*HMM_with_enzyme_1(V1_Km, NHSL1, RacGTP, V1_kcat);  // modifiers: RacGTP
    V1_Km = 15; V1_kcat = 0.0125;
  V2: NHSL1_active => NHSL1; Cell*Henri_Michaelis_Menten__irreversible__1(V2_Km, NHSL1_active, V2_V);
    V2_Km = 15; V2_V = 0.75;
  V3: SW_active => SW; Cell*HMM_with_enzyme_2(V3_Km, NHSL1_active, SW_active, V3_kcat);  // modifiers: NHSL1_active
    V3_Km = 15; V3_kcat = 0.025;
  V4: SW_active => SW; Cell*Henri_Michaelis_Menten__irreversible__2(V4_Km, SW_active, V4_V);
    V4_Km = 15; V4_V = 0.75;
  V7: Lpd => Lpd_active; Cell*HMM_with_enzyme_3(V7_Km, Lpd, RacGTP, V7_kcat);  // modifiers: RacGTP
    V7_Km = 15; V7_kcat = 0.025;
  V8: Lpd_active => Lpd; Cell*Henri_Michaelis_Menten__irreversible__3(V8_Km, Lpd_active, V8_V);
    V8_Km = 15; V8_V = 0.75;
  V9: RacGEF => RacGEF_active; Cell*HMM_with_enzyme_4(V9_Km, Lpd_active, RacGEF, V9_kcat);  // modifiers: Lpd_active
    V9_Km = 15; V9_kcat = 0.025;
  V10: RacGAP => RacGAP_active; Cell*HMM_with_enzyme_5(V10_Km, Lpd_active, RacGAP, V10_kcat);  // modifiers: Lpd_active
    V10_Km = 15; V10_kcat = 0.01;
  V11: RacGDP => RacGTP; Cell*HMM_with_enzyme_6(V11_Km, RacGDP, RacGEF_active, V11_kcat);  // modifiers: RacGEF_active
    V11_Km = 10; V11_kcat = 0.1;
  V12: RacGEF_active => RacGEF; Cell*Henri_Michaelis_Menten__irreversible__4(V12_Km, RacGEF_active, V12_V);
    V12_Km = 15; V12_V = 0.75;
  V13: RacGAP_active => RacGAP; Cell*Henri_Michaelis_Menten__irreversible__5(V13_Km, RacGAP_active, V13_V);
    V13_Km = 15; V13_V = 0.75;
  V14: RacGTP => RacGDP; Cell*HMM_with_enzyme_7(V14_Km, RacGAP_active, RacGTP, V14_kcat);  // modifiers: RacGAP_active
    V14_Km = 8; V14_kcat = 0.025;
  V5: SW => SW_active; Cell*HMM_with_enzyme_8(V5_Km, RacGTP, SW, V5_kcat);  // modifiers: RacGTP
    V5_Km = 15; V5_kcat = 0.025;
  V6: SW => SW_active; Cell*HMM_with_enzyme_9(V6_Km, Lpd_active, SW, V6_kcat);  // modifiers: Lpd_active
    V6_Km = 15; V6_kcat = 0.025;
  V15: SW_cytoplasm => SW; Cell*HMM_with_enzyme_10(V15_Km, NHSL1_active, SW_cytoplasm, V15_kcat);  // modifiers: NHSL1_active
    V15_Km = 5; V15_kcat = 0.1;
  V16: SW => SW_cytoplasm; Cell*V16_k1*SW;
    V16_k1 = 0.01;
  V17: SW_active => SW_cytoplasm; Cell*V17_k1*SW_active;
    V17_k1 = 0.01;
  V18: SW_cytoplasm => SW; Cell*HMM__irreversible(V18_kcat, SW_cytoplasm, Lpd_active, V18_Km);  // modifiers: Lpd_active
    V18_kcat = 0.025; V18_Km = 15;
  V19: RacGAP => RacGAP_active; Cell*HMM__irreversible(V19_kcat, RacGAP, SW_active, V19_Km);  // modifiers: SW_active
    V19_kcat = 0.01; V19_Km = 15;

  // Unit definitions:
  unit length = metre;
  unit area = metre^2;
  unit volume = litre;
  unit time = second;
  unit substance = 1e-9 mole;
end
